**
** Plate with hole, symmetry boundary conditions applied, displacement load, refined mesh
**
*Node
      1,           0.,          10.,           0.
      2,           0.,          40.,           0.
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*Element, type=S3
  1,  80,  79,  33
  2, 302, 298,  25
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*Nset, nset=Part-1-1__PickedSet8, generate
   1,  328,    1
*Elset, elset=Part-1-1__PickedSet8, generate
   1,  583,    1
*Shell Section, elset=Part-1-1__PickedSet8, material=Material-1
0.1, 5
*System
*Nset, nset=_PickedSet7
  2, 10
*Nset, nset=_PickedSet8
  8,  9, 36, 37, 38, 39, 40, 41, 42, 43, 44
*Elset, elset=_PickedSet8
  24,  34,  38,  42,  96,  99, 101, 103, 135, 136
*Nset, nset=_PickedSet9
  1,  2, 11, 12, 13, 14
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*Elset, elset=_PickedSet9
   3,   9,  64,  65, 117, 121, 125, 129, 170, 177, 236, 456, 476, 504, 511, 519
*Nset, nset=_PickedSet10
  2, 10, 66, 67, 68, 69, 70, 71
*Elset, elset=_PickedSet10
  43,  64,  67, 521, 522, 525, 527
**
**
**
*Material, name=Material-1
*Elastic
210000., 0.3
**
**
**
*Boundary
_PickedSet8, 2, 2
_PickedSet8, 3, 3
_PickedSet8, 4, 4
_PickedSet8, 5, 5
_PickedSet8, 6, 6
*Boundary
_PickedSet9, 1, 1
_PickedSet9, 3, 3
_PickedSet9, 4, 4
_PickedSet9, 5, 5
_PickedSet9, 6, 6
*Boundary
_PickedSet10, 2, 2, 2.
**
**
**
