**
** Plate with multiple holes, symmetry boundary conditions applied, displacement load
**
*Node
      1,   13.0705538,   11.7709122,           0.
      2,   12.3540325,   11.1361294,           0.
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*Element, type=S3
   1, 319,  58,  20
   2, 281, 143, 280
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*Nset, nset=Part-1-1__PickedSet8, generate
   1,  784,    1
*Elset, elset=Part-1-1__PickedSet8, generate
    1,  1396,     1
*Shell Section, elset=Part-1-1__PickedSet8, material=Material-1
0.1, 5
*Nset, nset=_PickedSet7
 43, 51
*Nset, nset=_PickedSet8
  49,  50, 110, 111, 112, 113, 114, 115, 116, 117, 118
*Elset, elset=_PickedSet8
 104, 114, 221, 331, 334, 336, 338, 340, 342, 540
*Nset, nset=_PickedSet9
 42, 43, 71, 72, 73, 74
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*Elset, elset=_PickedSet9
  44,  45,  75, 162, 163, 279
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*Nset, nset=_PickedSet10
  43,  51, 158, 159, 160, 161
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*Elset, elset=_PickedSet10
 123, 162, 166, 179, 417, 420
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**
**
**
*Material, name=Material-1
*Elastic
210000., 0.3
**
**
**
*Boundary
_PickedSet8, 2, 2
_PickedSet8, 3, 3
_PickedSet8, 4, 4
_PickedSet8, 5, 5
_PickedSet8, 6, 6
*Boundary
_PickedSet9, 1, 1
_PickedSet9, 3, 3
_PickedSet9, 4, 4
_PickedSet9, 5, 5
_PickedSet9, 6, 6
*Boundary
_PickedSet10, 2, 2, 2.
**
**
**
