**
** Plate, displacement applied
**
*Node
      1,           0.,           0.,           0.
      2,          10.,           0.,           0.
      3,          20.,           0.,           0.
      4,           0.,          10.,           0.
      5,          10.,          10.,           0.
      6,          20.,          10.,           0.
      7,           0.,          20.,           0.
      8,          10.,          20.,           0.
      9,          20.,          20.,           0.
*Element, type=S3
1, 1, 2, 5
2, 5, 4, 1
3, 2, 3, 6
4, 6, 5, 2
5, 4, 5, 8
6, 8, 7, 4
7, 5, 6, 9
8, 9, 8, 5
*Nset, nset=Part-1-1__PickedSet7, generate
 1,  9,  1
*Elset, elset=Part-1-1__PickedSet7, generate
 1,  8,  1
*Shell Section, elset=Part-1-1__PickedSet7, material=Material-1
0.1, 5
*Nset, nset=_PickedSet4, generate
 1,  3,  1
*Elset, elset=_PickedSet4
 1, 3
*Nset, nset=_PickedSet5, generate
 1,  7,  3
*Elset, elset=_PickedSet5
 2, 6
*Nset, nset=_PickedSet6
 9,
*Nset, nset=_PickedSet7
 9,
**
**
**
*Material, name=Material-1
*Elastic
210000., 0.3
**
**
**
*Boundary
_PickedSet4, 1, 1
_PickedSet4, 2, 2
_PickedSet4, 3, 3
_PickedSet4, 4, 4
_PickedSet4, 5, 5
_PickedSet4, 6, 6
*Boundary
_PickedSet5, 1, 1
_PickedSet5, 2, 2
_PickedSet5, 3, 3
_PickedSet5, 4, 4
_PickedSet5, 5, 5
_PickedSet5, 6, 6
*Boundary
_PickedSet7, 1, 1, 3.
_PickedSet7, 2, 2, 3.
**
**
**
